# OpenSim document version 40000
Model LuxoMuscle:
  PhysicalOffsetFrame back_assist_origin: socket_parent=/bodyset/chest_bar translation=(0 -0.01878611 0) [meters]
  PhysicalOffsetFrame back_assist_insertion: socket_parent=/bodyset/pelvis_bracket translation=(-0.004 0.022 0)
  PhysicalOffsetFrame knee_assist_origin: socket_parent=/bodyset/posterior_leg_bar translation=(0 0 0)
  PhysicalOffsetFrame knee_assist_insertion: socket_parent=/bodyset/bottom_bracket translation=(0.0101 0.0136 0)
  Ground
  BodySet:
    Body base: mass=1.25 [kg] mass_center=(0 0 0) inertia=(0.002747067 0.005 0.002747067 0 0 0) meshes=Base_meters.obj
    Body bottom_bracket: mass=0.625 mass_center=(0 0 0) inertia=(0.000375 0.000375 0.0006 0 0 0)
        meshes=bottom_bracket_meters.obj
    Body posterior_leg_bar: mass=0.15625 mass_center=(0 0 0) inertia=(0.0001880795 8.118903e-6 0.0001880807 0 0 0)
        meshes=Leg_meters.obj
    Body leg_Hlink: mass=0.15625 mass_center=(0 0 0) inertia=(0.0003079875 8.716476e-5 0.0002253485 0 0 0)
        meshes=H_Piece_meters.obj
    Body pelvis_bracket: mass=0.625 mass_center=(0 0 0) inertia=(0.0001727561 7.177391e-5 0.0002286147 0 0 0)
        meshes=Pelvis_bracket_meters.obj
    Body chest_bar: mass=0.15625 mass_center=(0 0 0) inertia=(0.0002020948 2.1588e-6 0.0002020948 0 0 0)
        meshes=Anterior_torso_bar.obj
    Body back_bar: mass=0.15625 mass_center=(0 0 0) inertia=(0.0002020948 2.1588e-6 0.0002020948 0 0 0)
        meshes=Posterior_torso_bar.obj
    Body shoulder_bracket: mass=0.625 mass_center=(0 0 0) inertia=(9.335017e-5 6.408223e-5 0.0001256924 0 0 0)
        meshes=Shoulder_meters.obj
    Body head: mass=1.25 mass_center=(0 0 0) inertia=(0.0007685748 0.00243382 0.00243382 0 0 0)
        meshes=(luxo_head_meters.obj Bulb_meters.obj)
  JointSet:
    FreeJoint base_ground: socket_parent_frame=ground_offset socket_child_frame=base_offset
      Coordinate base_ground_coord_0
      Coordinate base_ground_coord_1
      Coordinate base_ground_coord_2
      Coordinate base_ground_coord_3
      Coordinate base_ground_coord_4
      Coordinate base_ground_coord_5
      PhysicalOffsetFrame ground_offset: socket_parent=/ground translation=(0 0 0)
      PhysicalOffsetFrame base_offset: socket_parent=/bodyset/base translation=(0 -0.0136125 0)
    PinJoint base_pivot: socket_parent_frame=pivot_frame_on_base socket_child_frame=pivot_frame_on_bottom_bracket
      Coordinate base_pivot_coord_0
      PhysicalOffsetFrame pivot_frame_on_base: socket_parent=/bodyset/base translation=(0 0.03 0)
          orientation=(-1.570796 0 0) [radians]
      PhysicalOffsetFrame pivot_frame_on_bottom_bracket: socket_parent=/bodyset/bottom_bracket translation=(0 0 0)
          orientation=(-1.570796 0 0)
    PinJoint posterior_knee: socket_parent_frame=posterior_knee_on_bottom_bracket
        socket_child_frame=posterior_knee_on_posterior_bar
      Coordinate posterior_knee_coord_0: is_free_to_satisfy_constraints=true
      PhysicalOffsetFrame posterior_knee_on_bottom_bracket: socket_parent=/bodyset/bottom_bracket
          translation=(-0.01 -0.01 0)
      PhysicalOffsetFrame posterior_knee_on_posterior_bar: socket_parent=/bodyset/posterior_leg_bar
          translation=(0 -0.020006 0)
    PinJoint anterior_knee: socket_parent_frame=anterior_knee_on_bottom_bracket
        socket_child_frame=anterior_knee_on_anterior_bar
      Coordinate anterior_knee_coord_0: default_value=0.5235988
      PhysicalOffsetFrame anterior_knee_on_bottom_bracket: socket_parent=/bodyset/bottom_bracket
          translation=(0.01 0.003 0)
      PhysicalOffsetFrame anterior_knee_on_anterior_bar: socket_parent=/bodyset/leg_Hlink translation=(0 -0.023283 0)
    PinJoint anterior_hip: socket_parent_frame=anterior_hip_on_Hlink socket_child_frame=anterior_hip_on_pelvis
      Coordinate anterior_hip_coord_0: is_free_to_satisfy_constraints=true
      PhysicalOffsetFrame anterior_hip_on_Hlink: socket_parent=/bodyset/leg_Hlink translation=(0 0.020696 0)
      PhysicalOffsetFrame anterior_hip_on_pelvis: socket_parent=/bodyset/pelvis_bracket translation=(0.0135 0.002 0)
    PinJoint anterior_torso_hinge: socket_parent_frame=anterior_torso_hinge_on_pelvis
        socket_child_frame=anterior_torso_hinge_on_chest
      Coordinate anterior_torso_hinge_coord_0: default_value=-0.7853982
      PhysicalOffsetFrame anterior_torso_hinge_on_pelvis: socket_parent=/bodyset/pelvis_bracket
          translation=(0.0135 0.002 0)
      PhysicalOffsetFrame anterior_torso_hinge_on_chest: socket_parent=/bodyset/chest_bar translation=(0 -0.0221013 0)
    PinJoint posterior_torso_hinge: socket_parent_frame=posterior_torso_hinge_on_pelvis
        socket_child_frame=posterior_torso_hinge_on_back
      Coordinate posterior_torso_hinge_coord_0: is_free_to_satisfy_constraints=true
      PhysicalOffsetFrame posterior_torso_hinge_on_pelvis: socket_parent=/bodyset/pelvis_bracket
          translation=(-0.004 0.022 0)
      PhysicalOffsetFrame posterior_torso_hinge_on_back: socket_parent=/bodyset/back_bar translation=(0 -0.01878611 0)
    PinJoint anterior_thoracic_joint: socket_parent_frame=anterior_thoracic_joint_on_chest
        socket_child_frame=anterior_thoracic_joint_on_shoulder
      Coordinate anterior_thoracic_joint_coord_0: is_free_to_satisfy_constraints=true
      PhysicalOffsetFrame anterior_thoracic_joint_on_chest: socket_parent=/bodyset/chest_bar
          translation=(0 0.0221013 0)
      PhysicalOffsetFrame anterior_thoracic_joint_on_shoulder: socket_parent=/bodyset/shoulder_bracket
          translation=(0.003418 -0.0163 0)
    PinJoint cervical_joint: socket_parent_frame=cervical_joint_on_shoulder socket_child_frame=cervical_joint_on_head
      Coordinate cervical_joint_coord_0: locked=true
      PhysicalOffsetFrame cervical_joint_on_shoulder: socket_parent=/bodyset/shoulder_bracket
          translation=(0.005 0.005 0)
      PhysicalOffsetFrame cervical_joint_on_head: socket_parent=/bodyset/head translation=(-0.01717 -0.03506 0)
  ControllerSet:
    PrescribedController: actuator_list=(knee_extensor_left knee_extensor_right)
      FunctionSet ControlFunctions: PiecewiseConstantFunction(x=0 2 3, y=0.3 1 0.3)
          PiecewiseConstantFunction(x=0 2 3, y=0.3 1 0.3)
    PrescribedController prescribedcontroller_0: actuator_list=(back_extensor_left back_extensor_right)
      FunctionSet ControlFunctions: PiecewiseConstantFunction(x=0 2 3, y=0.3 1 0.3)
          PiecewiseConstantFunction(x=0 2 3, y=0.3 1 0.3)
  ConstraintSet:
    PointOnLineConstraint: socket_line_body=/bodyset/pelvis_bracket socket_follower_body=/bodyset/posterior_leg_bar
        line_direction_vec=(0 0 1) point_on_line=(-0.006 -0.015 0) point_on_follower=(0 0.020006 0)
    PointOnLineConstraint pointonlineconstraint_0: socket_line_body=/bodyset/shoulder_bracket
        socket_follower_body=/bodyset/back_bar line_direction_vec=(0 0 1) point_on_line=(-0.0124 0 0)
        point_on_follower=(0 0.0221013 0)
  ForceSet:
    BushingForce pivot_bushing: socket_frame1=/jointset/base_pivot/pivot_frame_on_base
        socket_frame2=/jointset/base_pivot/pivot_frame_on_bottom_bracket
        rotational_damping=(0.02 0.02 0.02) [Nm/(rad/s)]
    CoordinateLimitForce anterior_knee_coord_0_LimitForce: coordinate=anterior_knee_coord_0
        upper_stiffness=0.5 [N*m/degree] upper_limit=55 [degrees] lower_stiffness=0.5 [N*m/degree]
        lower_limit=10 [degrees] damping=0.005 transition=5 [degrees] compute_dissipation_energy=false
    CoordinateLimitForce anterior_torso_hinge_coord_0_LimitForce: coordinate=anterior_torso_hinge_coord_0
        upper_stiffness=0.5 upper_limit=-10 lower_stiffness=0.5 lower_limit=-60 damping=0.005 transition=5
        compute_dissipation_energy=false
    ElasticFoundationForce contact_force:
      ContactParametersSet contact_parameters:
        ContactParameters: geometry=(foot_surface floor_surface) stiffness=100000000 dissipation=5 static_friction=0.8
            dynamic_friction=0.8 viscous_friction=0.1
    Millard2012EquilibriumMuscle knee_extensor_right: min_control=0.01 max_control=1 max_isometric_force=100
        optimal_fiber_length=0.02 tendon_slack_length=0 pennation_angle_at_optimal=0 [radians]
        ignore_tendon_compliance=true
      PathPoint knee_extensor_right_origin: leg_Hlink (0 0.0018 0.0089)
      PathPoint knee_extensor_right_insertion: bottom_bracket (0.0101 0.0136 0.0089)
      ActiveForceLengthCurve: minimum_value=0
      ForceVelocityCurve: concentric_slope_at_vmax=0 concentric_slope_near_vmax=0.25 isometric_slope=5
          eccentric_slope_at_vmax=0 eccentric_slope_near_vmax=0.15 max_eccentric_velocity_force_multiplier=1.4
      FiberForceLengthCurve
      TendonForceLengthCurve
    Millard2012EquilibriumMuscle knee_extensor_left: min_control=0.01 max_control=1 max_isometric_force=100
        optimal_fiber_length=0.02 tendon_slack_length=0 pennation_angle_at_optimal=0 ignore_tendon_compliance=true
      PathPoint knee_extensor_left_origin: leg_Hlink (0 0.0018 -0.0089)
      PathPoint knee_extensor_left_insertion: bottom_bracket (0.0101 0.0136 -0.0089)
      ActiveForceLengthCurve: minimum_value=0
      ForceVelocityCurve: concentric_slope_at_vmax=0 concentric_slope_near_vmax=0.25 isometric_slope=5
          eccentric_slope_at_vmax=0 eccentric_slope_near_vmax=0.15 max_eccentric_velocity_force_multiplier=1.4
      FiberForceLengthCurve
      TendonForceLengthCurve
    Millard2012EquilibriumMuscle back_extensor_right: min_control=0.01 max_control=1 max_isometric_force=100
        optimal_fiber_length=0.035 tendon_slack_length=0.01 pennation_angle_at_optimal=0 ignore_tendon_compliance=true
      PathPoint back_extensor_right_origin: chest_bar (0 0 0.0089)
      PathPoint back_extensor_right_insertion: back_bar (0 -0.01878611 0.0089)
      ActiveForceLengthCurve: minimum_value=0
      ForceVelocityCurve: concentric_slope_at_vmax=0 concentric_slope_near_vmax=0.25 isometric_slope=5
          eccentric_slope_at_vmax=0 eccentric_slope_near_vmax=0.15 max_eccentric_velocity_force_multiplier=1.4
      FiberForceLengthCurve
      TendonForceLengthCurve
    Millard2012EquilibriumMuscle back_extensor_left: min_control=0.01 max_control=1 max_isometric_force=100
        optimal_fiber_length=0.035 tendon_slack_length=0.01 pennation_angle_at_optimal=0 ignore_tendon_compliance=true
      PathPoint back_extensor_left_origin: chest_bar (0 0 -0.0089)
      PathPoint back_extensor_left_insertion: back_bar (0 -0.01878611 -0.0089)
      ActiveForceLengthCurve: minimum_value=0
      ForceVelocityCurve: concentric_slope_at_vmax=0 concentric_slope_near_vmax=0.25 isometric_slope=5
          eccentric_slope_at_vmax=0 eccentric_slope_near_vmax=0.15 max_eccentric_velocity_force_multiplier=1.4
      FiberForceLengthCurve
      TendonForceLengthCurve
  ContactGeometrySet:
    ContactHalfSpace floor_surface: socket_frame=/ground location=(0 0 0) orientation=(0 0 -1.570796)
    ContactMesh foot_surface: socket_frame=/bodyset/base location=(0 0 0) filename=thin_disc_0.11_by_0.01_meters.obj
